// COMSOL Multiphysics 6.3.0.420 model "phase1_template.mph"
// Outline of the model tree

Parameters
  rho_fluid = 1050 [kg/m^3]
  Re_target = 75
  mu_ref = 0.0035 [Pa*s]
  mu_inf = 0.0035 [Pa*s]
  mu_0 = 0.056 [Pa*s]
  lambda_cy = 3.313 [s]
  n_index = 0.3568
  a_yasuda = 2.0
  D_eff = 0.0015 [m]  // (Placeholder, overwritten by python)
  U_inlet = 0.1 [m/s]  // (Placeholder, overwritten by python)

Variables
  var1
    mu_final = mu_inf + (mu_0 - mu_inf) * (1 + (lambda_cy * spf.sr)^a_yasuda)^((n_index - 1) / a_yasuda)

Selections
  box1: Box "Inlet_Selection" | entitydim = 1; xmin = -1; xmax = 0.001; condition = allvertices
  box2: Box "Outlet_Selection" | entitydim = 1; xmin = 0.03; xmax = 1; condition = inside
  dif1: Difference "Walls_Selection"
    entitydim = 1
    add = {nastransel1, nastransel2, nastransel3, nastransel4}
    subtract = {box1, box2}

Geometry
  geom1 "Geometry 1" (2D, length unit m)

Physics
  spf: LaminarFlow on all domains
    dependent variable u = {u, v, w}
    fp1: FluidProperties (default)
      rho_mat = userdef
      rho = rho_fluid
      Constitutiverelation = Newtonian
      mu_mat = userdef
      mu = mu_final
    init1: init "Initial Values 1" (default)
    wallbc1: WallBC "Wall 1" (default)
    inl1: InletBoundary "Inlet" on selection box1
      BoundaryCondition = FullyDevelopedFlow
      multipleInlets = 1
      ComponentWise = NormalInflowVelocity
      Uavfdf = U_inlet
    out1: OutletBoundary "Outlet 1" on selection box2

Mesh
  mesh1 "Mesh 1"
    imp1: Import
      source = nastran
      filename = C:\Users\pgssy\LadHyX_ml_cfd_thrombus_predictions\data\raw\tier1\vessel_11.nas
    fin: Finalize

Studies
  std1 "Study 1"
    stat: Stationary

Solver configurations
  sol1 "Solution 1" (study std1)
    v1: Variables "Dependent Variables 1"
    s1: Stationary "Stationary Solver 1"
      fc1: FullyCoupled
      d1: Direct "Direct, fluid flow variables (spf)"

Datasets
  dset1: Solution | solution = sol1

Plots
  pg1: PlotGroup2D "Velocity (spf)" | data = dset1
    surf1: Surface | expr = spf.U
  pg2: PlotGroup2D "Pressure (spf)" | data = dset1
    con1: Contour | expr = p; levelrounding = off
  pg3: PlotGroup2D "Viscosity plot" | data = dset1
    surf1: Surface "Viscosity" | expr = mu_final